*Heading
** Job name: Job-CZM-mesh2 Model name: Model-CZM-mesh2
** Generated by: Abaqus/CAE 2019
*Preprint, echo=NO, model=NO, history=NO, contact=NO
**
** PARTS
**
*Part, name=Part-Right
*Node
      1,         162.,         100.
      2,         162.,          19.
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*Element, type=CPE4
 1,    1,   13, 1210,   50
 2,   13,   14, 1211, 1210
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*Nset, nset=Set-1, generate
     1,  32788,      1
*Elset, elset=Set-1, generate
     1,  32226,      1
** Section: Section-1
*Solid Section, elset=Set-1, material=Material-1
,
*End Part
**
**
** ASSEMBLY
**
*Assembly, name=Assembly
**
*Instance, name=Part-Right-1, part=Part-Right
*End Instance
**
*End Assembly
**
** MATERIALS
**
*Material, name=Material-1
*Elastic
1., 0.3
